<Lems>

    <!-- Specify which component to run -->
    <Target component="sim1"/>

    <!-- Include core NeuroML2 ComponentType definitions -->
    <Include file="Cells.xml"/>
    <Include file="Networks.xml"/>
    <Include file="Inputs.xml"/>
    <Include file="Simulation.xml"/>

    <Include file="WhichModel.nml"/>

    <Simulation id="sim1" length="300ms" step="0.025ms" target="net1">

        <Display id="A" title="(A) tonic spiking" timeScale="1ms" xmin="-20" xmax="320" ymin="-90" ymax="40">
            <Line id ="iz1" quantity="popA[0]/v" scale="1mV"  color="#FF0000" timeScale="1ms"/>
            <Line id ="i0" quantity="popA[0]/iA/I" scale="1"  color="#222222" timeScale="1ms"/>
        </Display>
        <Display id="B" title="(B) phasic spiking" timeScale="1ms" xmin="-20" xmax="320" ymin="-90" ymax="40">
            <Line id ="iz1" quantity="popB[0]/v" scale="1mV"  color="#FF0000" timeScale="1ms"/>
            <Line id ="i0" quantity="popB[0]/iB/I" scale="1"  color="#222222" timeScale="1ms"/>
        </Display>
        <Display id="C" title="(C) tonic bursting" timeScale="1ms" xmin="-20" xmax="320" ymin="-90" ymax="40">
            <Line id ="iz1" quantity="popC[0]/v" scale="1mV"  color="#FF0000" timeScale="1ms"/>
            <Line id ="i0" quantity="popC[0]/iC/I" scale="1"  color="#222222" timeScale="1ms"/>
        </Display>
        <Display id="D" title="(D) phasic bursting" timeScale="1ms" xmin="-20" xmax="320" ymin="-90" ymax="40">
            <Line id ="iz1" quantity="popD[0]/v" scale="1mV"  color="#FF0000" timeScale="1ms"/>
            <Line id ="i0" quantity="popD[0]/iD/I" scale="1"  color="#222222" timeScale="1ms"/>
        </Display>
        <Display id="E" title="(E) mixed mode" timeScale="1ms" xmin="-20" xmax="320" ymin="-90" ymax="40">
            <Line id ="iz1" quantity="popE[0]/v" scale="1mV"  color="#FF0000" timeScale="1ms"/>
            <Line id ="i0" quantity="popE[0]/iE/I" scale="1"  color="#222222" timeScale="1ms"/>
        </Display>
        <Display id="F" title="(F) spike freq. adapt" timeScale="1ms" xmin="-20" xmax="320" ymin="-90" ymax="40">
            <Line id ="iz1" quantity="popF[0]/v" scale="1mV"  color="#FF0000" timeScale="1ms"/>
            <Line id ="i0" quantity="popF[0]/iF/I" scale="1"  color="#222222" timeScale="1ms"/>
        </Display>
        <Display id="G" title="(G) Class 1 excitable" timeScale="1ms" xmin="-20" xmax="320" ymin="-90" ymax="40">
            <Line id ="iz1" quantity="popG[0]/v" scale="1mV"  color="#FF0000" timeScale="1ms"/>
            <Line id ="iz2" quantity="popG[0]/U" scale="1"    color="#BBA0AA" timeScale="1ms"/>
            <Line id ="i0" quantity="popG[0]/iG/I" scale="1"  color="#222222" timeScale="1ms"/>
        </Display>
        <Display id="H" title="(H) Class 2 excitable" timeScale="1ms" xmin="-20" xmax="320" ymin="-90" ymax="40">
            <Line id ="iz1" quantity="popH[0]/v" scale="1mV"  color="#FF0000" timeScale="1ms"/>
            <Line id ="iz2" quantity="popH[0]/U" scale="1"    color="#BBA0AA" timeScale="1ms"/>
            <Line id ="i0" quantity="popH[0]/iH/I" scale="1"  color="#222222" timeScale="1ms"/>
        </Display>
        <Display id="I" title="(I) spike latency" timeScale="1ms" xmin="-20" xmax="320" ymin="-90" ymax="40">
            <Line id ="iz1" quantity="popI[0]/v" scale="1mV"  color="#FF0000" timeScale="1ms"/>
            <Line id ="i0" quantity="popI[0]/iI/I" scale="1"  color="#222222" timeScale="1ms"/>
        </Display>
        <Display id="J" title="(J) subthreshold oscillations" timeScale="1ms" xmin="-20" xmax="320" ymin="-90" ymax="40">
            <Line id ="iz1" quantity="popJ[0]/v" scale="1mV"  color="#FF0000" timeScale="1ms"/>
            <Line id ="i0" quantity="popJ[0]/iJ/I" scale="1"  color="#222222" timeScale="1ms"/>
        </Display>
        <Display id="K" title="(K) resonator" timeScale="1ms" xmin="-20" xmax="320" ymin="-90" ymax="40">
            <Line id ="iz1" quantity="popK[0]/v" scale="1mV"  color="#FF0000" timeScale="1ms"/>
            <Line id ="i1" quantity="popK[0]/iK1/I" scale="0.1"  color="#222222" timeScale="1ms"/>
            <Line id ="i2" quantity="popK[0]/iK2/I" scale="0.1"  color="#224444" timeScale="1ms"/>
            <Line id ="i3" quantity="popK[0]/iK3/I" scale="0.1"  color="#226666" timeScale="1ms"/>
            <Line id ="i4" quantity="popK[0]/iK4/I" scale="0.1"  color="#228888" timeScale="1ms"/>
        </Display>

        <Display id="P" title="(P) bistability" timeScale="1ms" xmin="-20" xmax="320" ymin="-90" ymax="40">
            <Line id ="iz1" quantity="popP[0]/v" scale="1mV"  color="#FF0000" timeScale="1ms"/>
            <Line id ="i1" quantity="popP[0]/iP1/I" scale="0.1"  color="#222222" timeScale="1ms"/>
            <Line id ="i2" quantity="popP[0]/iP2/I" scale="0.1"  color="#224444" timeScale="1ms"/>
            <Line id ="i3" quantity="popP[0]/iP3/I" scale="0.1"  color="#226666" timeScale="1ms"/>
        </Display>

    </Simulation>

</Lems>
